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/BATCH
/COM,ANSYS RELEASE Release 18.1      BUILD 18.1      UP20170403       23:48:44
/input,menust,tmp,''
/GST,ON
/PLO,INFO,3
/GRO,CURL,ON
/CPLANE,1
WPSTYLE,,,,,,,,0
/NOPR
KEYW,PR_SET,1
KEYW,PR_STRUC,1
KEYW,PR_THERM,0
KEYW,PR_FLUID,0
KEYW,PR_ELMAG,0
KEYW,MAGNOD,0
KEYW,MAGEDG,0
KEYW,MAGHFE,0
KEYW,MAGELC,0
KEYW,PR_MULTI,0
/GO
/COM,
/COM,Preferences for GUI filtering have been set to display:
/COM,  Structural
/PREP7
ET,1,PLANE183
ET,2,PLANE183
ET,3,PLANE183
KEYOPT,1,1,0
KEYOPT,1,3,1
KEYOPT,1,6,0
KEYOPT,2,1,0
KEYOPT,2,3,1
KEYOPT,2,6,0
KEYOPT,3,1,0
KEYOPT,3,3,1
KEYOPT,3,6,0
MPTEMP,,,,,,,,
MPTEMP,1,0
MPDATA,EX,1,,800
MPDATA,PRXY,1,,0.2
MPTEMP,,,,,,,,
MPTEMP,1,0
MPDATA,EX,2,,10.35
MPDATA,PRXY,2,,0.45
BLC5,0,0,100,70
SAVE
CYL4,0,0,35
RESUME
/COM,ANSYS RELEASE Release 18.1      BUILD 18.1      UP20170403       23:53:22
CYL4,-50,-35,35
ASBA,       1,       2
SAVE
RESUME
/COM,ANSYS RELEASE Release 18.1      BUILD 18.1      UP20170403       23:58:11
BLC4,50,35,-20,10
RESUME
/COM,ANSYS RELEASE Release 18.1      BUILD 18.1      UP20170403       00:01:11
BLC4,50,35,-40,10
BLC4,-50,35,25,-20
ASBA,       3,       2
SAVE
K,1,-30,15,0,
K,9,-30,15,0,
K,19,-30,15,0,
K,20,-30,35,0,
RESUME
/COM,ANSYS RELEASE Release 18.1      BUILD 18.1      UP20170403       00:06:38
K,20,-25,35,0,
K,19,-25,15,0,
K,19,10,35,0,
FLST,2,5,3
FITEM,2,11
FITEM,2,1
FITEM,2,12
FITEM,2,20
FITEM,2,19
A,P51X
FLST,2,4,8
FITEM,2,-25.2,15.3,0
FITEM,2,10.05,35.05,0
FITEM,2,-24.95,35.05,0
FITEM,2,-24.95,15.3,0
PRI2,P51X,0.0,0.0
lstr,19,20
LPLOT
FLST,2,3,4
FITEM,2,3
FITEM,2,11
FITEM,2,10
AL,P51X
APLOT
ASBA,       4,       2
ASBA,       3,       1
ASBA,       3,       1
SAVE
K,22,-15,15,0,
RESUME
/COM,ANSYS RELEASE Release 18.1      BUILD 18.1      UP20170403       00:22:40
K,22,-20,15,0,
RESUME
/COM,ANSYS RELEASE Release 18.1      BUILD 18.1      UP20170403       00:22:53
K,22,-20,15,0,
KPLOT
RESUME
/COM,ANSYS RELEASE Release 18.1      BUILD 18.1      UP20170403       00:23:12
KPLOT
K,22,-25,15,0,
RESUME
/COM,ANSYS RELEASE Release 18.1      BUILD 18.1      UP20170403       00:23:26
K,22,50,5,0,
K,22,15,-15,0,
K,22,50,-15,0,
KPLOT
K,23,15,-15,0,
K,24,50,5,0,
SAVE
lstr,23,24
lstr,22,23
lstr,24,22
FLST,2,3,4
FITEM,2,10
FITEM,2,11
FITEM,2,14
AL,P51X
APLOT
ASBA,       3,       2
BLC4,50,-35,-35,20
ASBA,       4,       2
SAVE
BLC4,50,35,-40,10
ASBA,       1,       2
RESUME
/COM,ANSYS RELEASE Release 18.1      BUILD 18.1      UP20170403       00:37:41
BLC4,50,35,-40,30
ASBA,       1,       2
ADELE,       2
LANG,       3,       1,90, ,
LANG,       3,       2,90, ,
LPLOT
LDELE,      12
FLST,2,5,4,ORDE,5
FITEM,2,4
FITEM,2,6
FITEM,2,9
FITEM,2,11
FITEM,2,14
LDELE,P51X
LDELE,       6
LDELE,       6
LDELE,       7
ADELE,       1
APLOT
LPLOT
LDELE,       7, , ,1
LDELE,       6
LDELE,       4
RESUME
/COM,ANSYS RELEASE Release 18.1      BUILD 18.1      UP20170403       00:43:19
ADELE,       1
LPLOT
SAVE
LDELE,      12
LDELE,       6
FLST,2,2,4,ORDE,2
FITEM,2,4
FITEM,2,7
LDELE,P51X
SAVE
APLOT
LPLOT
LANG,       3,       1,90, ,
K,50,10,35,0,
LANG,       3,      50,90, ,
RESUME
/COM,ANSYS RELEASE Release 18.1      BUILD 18.1      UP20170403       00:45:45
LPLOT
APLOT
LANG,3,1,90, ,
K,40,-50,16.5,0,
K,41,-25,16.5,0,
SAVE
K,41,10,36.5,0,
KPLOT
APLOT
KPLOT
APLOT
K,42,-25,16.5,0,
KPLOT
LSTR,      40,      42
LSTR,      42,      41
LPLOT
KPLOT
LSTR,      10,      40
LSTR,       1,      41
APLOT
LPLOT
FLST,2,6,4
FITEM,2,7
FITEM,2,3
FITEM,2,4
FITEM,2,2
FITEM,2,8
FITEM,2,6
AL,P51X
APLOT
SAVE
BLC4,-15,-35,30,1.5
ASBA,       3,       2
BLC4,-15,-35,35,1.5
ADELE,       2, , ,1
BLC4,-15,-35,30,1.5
BLC4,15,-35,-1.5,20
FLST,2,2,5,ORDE,2
FITEM,2,2
FITEM,2,4
ASBA,P51X,       3
BLC4,15,-35,-1.5,20
FLST,2,2,5,ORDE,2
FITEM,2,2
FITEM,2,5
AADD,P51X
APLOT
CYL4,-50,-35,35
ASBA,       3,       2
FLST,2,2,5,ORDE,2
FITEM,2,3
FITEM,2,6
ASBA,P51X,       2
CYL4,-50,-35,34
CYL4,-50,-35,32
ADELE,       5, , ,1
ASBA,       2,       4
SAVE
CYL4,-50,-35,34
CYL4,-50,-35,32
ASBA,       2,       4
BLC4,-50,35,-100,-140
BLC4,15,-35,-100,-40
FLST,2,3,5,ORDE,3
FITEM,2,1
FITEM,2,5
FITEM,2,7
FLST,2,3,5,ORDE,3
FITEM,2,1
FITEM,2,5
FITEM,2,7
FLST,3,2,5,ORDE,2
FITEM,3,2
FITEM,3,4
ASBA,P51X,P51X
SAVE
CYL4,-50,-35,32
BLC5,-50,-70,40,50
BLC5,-50,-70,37,50
ASBA,       4,       5
CYL4,-50,-35,30.5
ASBA,       2,       4
CYL4,-50,-35,32
ASBA,       7,       2
BLC5,-50,-70,37,100
ASBA,       5,       2
FLST,2,2,5,ORDE,2
FITEM,2,4
FITEM,2,7
AADD,P51X
BLC4,-50,35,-100,-140
FLST,2,2,5,ORDE,2
FITEM,2,2
FITEM,2,10
AADD,P51X
ASBA,       5,       4
SAVE
KPLOT
LSTR,       1,      24
APLOT
LPLOT
FLST,2,3,4
FITEM,2,22
FITEM,2,1
FITEM,2,17
AL,P51X
FLST,2,3,4
FITEM,2,22
FITEM,2,1
FITEM,2,17
AL,P51X
FLST,2,3,4
FITEM,2,13
FITEM,2,22
FITEM,2,17
AL,P51X
APLOT
ASBA,       6,       4
SAVE
MPTEMP,,,,,,,,
MPTEMP,1,0
MPDATA,EX,3,,3880.6
MPDATA,EY,3,,3880.6
MPDATA,EZ,3,,5712.6
MPDATA,PRXY,3,,0.4
MPDATA,PRYZ,3,,0.25
MPDATA,PRXZ,3,,0.25
MPDATA,GXY,3,,5.71
MPDATA,GYZ,3,,7.11
MPDATA,GXZ,3,,6.58
MPTEMP,,,,,,,,
MPTEMP,1,0
MPDATA,EX,4,,2000
MPDATA,PRXY,4,,0.3
SAVE
FINISH
! /EXIT,ALL
/BATCH
/COM,ANSYS RELEASE Release 18.1      BUILD 18.1      UP20170403       15:48:45
/input,menust,tmp,''
/GST,ON
/PLO,INFO,3
/GRO,CURL,ON
/CPLANE,1
WPSTYLE,,,,,,,,0
RESUME
/COM,ANSYS RELEASE Release 18.1      BUILD 18.1      UP20170403       15:53:53
/PREP7
FINISH
! /EXIT,NOSAV
/BATCH
/COM,ANSYS RELEASE Release 18.1      BUILD 18.1      UP20170403       23:02:28
/input,menust,tmp,''
/GST,ON
/PLO,INFO,3
/GRO,CURL,ON
/CPLANE,1
WPSTYLE,,,,,,,,0
RESUME
/COM,ANSYS RELEASE Release 18.1      BUILD 18.1      UP20170403       23:02:38
/PREP7
CYL4,-50,-35,30.5
SAVE
BLC5,-50,-65.5,40,50
RESUME
/COM,ANSYS RELEASE Release 18.1      BUILD 18.1      UP20170403       23:15:28
BLC5,-50,-65.5,38.5,70
RESUME
/COM,ANSYS RELEASE Release 18.1      BUILD 18.1      UP20170403       23:15:56
BLC5,-50,-65.5,37,60
RESUME
/COM,ANSYS RELEASE Release 18.1      BUILD 18.1      UP20170403       23:17:11
BLC5,-50,-65,37,60
FLST,2,2,5,ORDE,2
FITEM,2,4
FITEM,2,6
AADD,P51X
KPLOT
APLOT
elist
nlist
klist
kplot
SAVE
K,60,48.5,5,0,
LSTR,      13,      17
LSTR,      13,      24
LSTR,      17,      60
LSTR,      60,      24
LPLOT
FLST,2,4,4
FITEM,2,37
FITEM,2,33
FITEM,2,10
FITEM,2,12
AL,P51X
FLST,2,4,4
FITEM,2,37
FITEM,2,33
FITEM,2,10
FITEM,2,12
AL,P51X
FLST,2,4,4
FITEM,2,37
FITEM,2,31
FITEM,2,33
FITEM,2,28
AL,P51X
RESUME
/COM,ANSYS RELEASE Release 18.1      BUILD 18.1      UP20170403       23:49:35
KPLOT
K,60,48.5,5,0,
LSTR,      24,      60
LSTR,      17,      60
LPLOT
FLST,2,4,4
FITEM,2,31
FITEM,2,10
FITEM,2,33
FITEM,2,28
AL,P51X
RESUME
/COM,ANSYS RELEASE Release 18.1      BUILD 18.1      UP20170403       23:51:49
K,60,48.5,5,0,
KPLOT
LSTR,      24,      60
LSTR,      17,      60
LPLOT
FLST,2,4,4
FITEM,2,31
FITEM,2,10
FITEM,2,33
FITEM,2,12
AL,P51X
FLST,2,4,4
FITEM,2,31
FITEM,2,33
FITEM,2,10
FITEM,2,28
AL,P51X
FLST,2,5,3
FITEM,2,13
FITEM,2,17
FITEM,2,60
FITEM,2,24
FITEM,2,23
A,P51X
LDELE,      12
LDELE,      28
LDELE,      28
LDELE,       1
FLST,2,4,4
FITEM,2,31
FITEM,2,10
FITEM,2,33
FITEM,2,28
AL,P51X
FLST,2,4,4
FITEM,2,31
FITEM,2,10
FITEM,2,33
FITEM,2,28
AL,P51X
FLST,2,4,4
FITEM,2,31
FITEM,2,10
FITEM,2,33
FITEM,2,28
AL,P51X
LDELE,      33, , ,1
LDELE,      31, , ,1
K,60,48.5,5,0,
K,60,48.5,5,0,
KPLOT
LSTR,      17,      60
LPLOT
KPLOT
LSTR,      60,      24
LSTR,      17,      13
LSTR,      17,      13
LSTR,      17,      60
LPLOT
FLST,2,4,4
FITEM,2,31
FITEM,2,28
FITEM,2,10
FITEM,2,1
AL,P51X
KPLOT
KPLOT,,,,HPT
KPLOT
kplot
klist
K,61,13.5,-15,0,
LSTR,      61,      60
LSTR,      23,      61
LPLOT
FLST,2,4,4
FITEM,2,33
FITEM,2,37
FITEM,2,10
FITEM,2,31
AL,P51X
APLOT
ASBA,       5,       4
LPLOT
LSTR,      13,      24
FLST,2,4,4
FITEM,2,38
FITEM,2,12
FITEM,2,10
FITEM,2,31
AL,P51X
K,62,13.5,-15,0,
LSTR,      62,      13
LSTR,      62,      60
FLST,2,4,4
FITEM,2,10
FITEM,2,38
FITEM,2,31
FITEM,2,28
AL,P51X
klist
LSTR,      62,      60
LSTR,      62,      13
LSTR,      13,      24
LSTR,      60,      24
FLST,2,4,4
FITEM,2,10
FITEM,2,38
FITEM,2,31
FITEM,2,28
AL,P51X
K,63,13.5,-15,0,
K,64,15,-15,0,
LSTR,      63,      64
LSTR,      13,      24
LSTR,      63,      60
FLST,2,4,4
FITEM,2,10
FITEM,2,39
FITEM,2,37
FITEM,2,31
AL,P51X
klist
LDELE,      10, , ,1
LSTR,      64,      24
FLST,2,4,4
FITEM,2,10
FITEM,2,39
FITEM,2,31
FITEM,2,37
AL,P51X
SAVE
APLOT
FLST,2,2,5,ORDE,2
FITEM,2,3
FITEM,2,-4
AADD,P51X
BLC4,-50,35,-100,-200
ASBA,       7,       3
SAVE
/BATCH
/COM,ANSYS RELEASE Release 18.1      BUILD 18.1      UP20170403       17:24:20
/input,menust,tmp,''
/COM,ANSYS RELEASE Release 18.1      BUILD 18.1      UP20170403       17:24:20
/GST,ON
/PLO,INFO,3
/GRO,CURL,ON
/CPLANE,1
WPSTYLE,,,,,,,,0
RESUME
/COM,ANSYS RELEASE Release 18.1      BUILD 18.1      UP20170403       17:24:23
/PREP7
BLC4,-15,-35,-0.5,1.5
FLST,2,3,5,ORDE,3
FITEM,2,3
FITEM,2,6
FITEM,2,8
ASBA,P51X,       3
BLC4,-15,-35,-0.5,1.5
FLST,2,2,5,ORDE,2
FITEM,2,3
FITEM,2,5
AADD,P51X
SAVE
FLST,2,3,5,ORDE,3
FITEM,2,1
FITEM,2,6
FITEM,2,10
AGLUE,P51X
RESUME
/COM,ANSYS RELEASE Release 18.1      BUILD 18.1      UP20170403       17:30:53
FLST,2,5,5,ORDE,5
FITEM,2,1
FITEM,2,6
FITEM,2,-7
FITEM,2,9
FITEM,2,-10
AGLUE,P51X
FLST,2,2,5,ORDE,2
FITEM,2,2
FITEM,2,4
AGLUE,P51X
FLST,5,3,5,ORDE,3
FITEM,5,1
FITEM,5,-2
FITEM,5,11
CM,_Y,AREA
ASEL, , , ,P51X
CM,_Y1,AREA
CMSEL,S,_Y
ET,4,PLANE183
KEYOPT,4,1,0
KEYOPT,4,3,1
KEYOPT,4,6,0
FLST,5,3,5,ORDE,3
FITEM,5,1
FITEM,5,-2
FITEM,5,11
CM,_Y,AREA
ASEL, , , ,P51X
CM,_Y1,AREA
CMSEL,S,_Y
CMSEL,S,_Y1
AATT,       3, ,   3,       0,
CMSEL,S,_Y
CMDELE,_Y
CMDELE,_Y1
FLST,5,2,5,ORDE,2
FITEM,5,6
FITEM,5,8
CM,_Y,AREA
ASEL, , , ,P51X
CM,_Y1,AREA
CMSEL,S,_Y
CMSEL,S,_Y1
AATT,       1, ,   1,       0,
CMSEL,S,_Y
CMDELE,_Y
CMDELE,_Y1
CM,_Y,AREA
ASEL, , , ,       3
CM,_Y1,AREA
CMSEL,S,_Y
CMSEL,S,_Y1
AATT,       2, ,   2,       0,
CMSEL,S,_Y
CMDELE,_Y
CMDELE,_Y1
CM,_Y,AREA
ASEL, , , ,       5
CM,_Y1,AREA
CMSEL,S,_Y
CMSEL,S,_Y1
AATT,       4, ,   4,       0,
CMSEL,S,_Y
CMDELE,_Y
CMDELE,_Y1
SAVE
LDELE,      28, , ,1
FLST,3,7,5,ORDE,6
FITEM,3,1
FITEM,3,-3
FITEM,3,5
FITEM,3,-6
FITEM,3,8
FITEM,3,11
AGEN, ,P51X, , ,50,0,0, , ,1
klist
kplot
KDELE,      60
LDELE,       3, , ,1
KDELE,      60
lplot
LDELE,      33, , ,1
FLST,3,7,5,ORDE,6
FITEM,3,1
FITEM,3,-3
FITEM,3,5
FITEM,3,-6
FITEM,3,8
FITEM,3,11
AGEN, ,P51X, , ,50,0,0, , ,1
SAVE
SAVE
FINISH
! /EXIT,NOSAV
/BATCH
/COM,ANSYS RELEASE Release 18.1      BUILD 18.1      UP20170403       17:40:19
/input,menust,tmp,''
/COM,ANSYS RELEASE Release 18.1      BUILD 18.1      UP20170403       17:40:19
/GST,ON
/PLO,INFO,3
/GRO,CURL,ON
/CPLANE,1
WPSTYLE,,,,,,,,0
RESUME
/COM,ANSYS RELEASE Release 18.1      BUILD 18.1      UP20170403       17:40:33
/PREP7
/BATCH
/COM,ANSYS RELEASE Release 18.1      BUILD 18.1      UP20170403       00:55:54
/input,menust,tmp,''
/GST,ON
/PLO,INFO,3
/GRO,CURL,ON
/CPLANE,1
WPSTYLE,,,,,,,,0
RESUME
/COM,ANSYS RELEASE Release 18.1      BUILD 18.1      UP20170403       00:56:00
/PREP7
ET,5,PLANE183
ETDEL,5
MPTEMP,,,,,,,,
MPTEMP,1,0
MPDATA,MU,5,,0.0000000001
SAVE
FINISH
/SOL
FINISH
/PREP7
FLST,2,7,5,ORDE,6
FITEM,2,1
FITEM,2,-3
FITEM,2,5
FITEM,2,-6
FITEM,2,8
FITEM,2,11
AESIZE,P51X,0.75,
MSHAPE,0,2D
MSHKEY,0
FLST,5,7,5,ORDE,6
FITEM,5,1
FITEM,5,-3
FITEM,5,5
FITEM,5,-6
FITEM,5,8
FITEM,5,11
CM,_Y,AREA
ASEL, , , ,P51X
CM,_Y1,AREA
CHKMSH,'AREA'
CMSEL,S,_Y
AMESH,_Y1
CMDELE,_Y
CMDELE,_Y1
CMDELE,_Y2
lplot
/COM, CONTACT PAIR CREATION - START
CM,_NODECM,NODE
CM,_ELEMCM,ELEM
CM,_KPCM,KP
CM,_LINECM,LINE
CM,_AREACM,AREA
CM,_VOLUCM,VOLU
/GSAV,cwz,gsav,,temp
MP,MU,5,1e-010
MAT,5
MP,EMIS,5,7.88860905221e-031
R,3
REAL,3
ET,6,169
ET,7,172
R,3,,,1.0,0.1,0,
RMORE,,,1.0E20,0.0,1.0,
RMORE,0.0,0,1.0,,1.0,0.5
RMORE,0,1.0,1.0,0.0,,1.0
RMORE,,,,,,1.0
KEYOPT,7,3,0
KEYOPT,7,4,0
KEYOPT,7,5,0
KEYOPT,7,7,0
KEYOPT,7,8,0
KEYOPT,7,9,0
KEYOPT,7,10,0
KEYOPT,7,11,0
KEYOPT,7,12,0
KEYOPT,7,2,0
! Generate the target surface
LSEL,S,,,36
CM,_TARGET,LINE
TYPE,6
NSLL,S,1
ESLN,S,0
ESURF
CMSEL,S,_ELEMCM
! Generate the contact surface
LSEL,S,,,21
CM,_CONTACT,LINE
TYPE,7
NSLL,S,1
ESLN,S,0
ESURF
ALLSEL
ESEL,ALL
ESEL,S,TYPE,,6
ESEL,A,TYPE,,7
ESEL,R,REAL,,3
/PSYMB,ESYS,1
/NUM,1
EPLOT
ESEL,ALL
ESEL,S,TYPE,,6
ESEL,A,TYPE,,7
ESEL,R,REAL,,3
CMSEL,A,_NODECM
CMDEL,_NODECM
CMSEL,A,_ELEMCM
CMDEL,_ELEMCM
CMSEL,S,_KPCM
CMDEL,_KPCM
CMSEL,S,_LINECM
CMDEL,_LINECM
CMSEL,S,_AREACM
CMDEL,_AREACM
CMSEL,S,_VOLUCM
CMDEL,_VOLUCM
/GRES,cwz,gsav
CMDEL,_TARGET
CMDEL,_CONTACT
/COM, CONTACT PAIR CREATION - END
/MREP,EPLOT
eplot
FLST,2,6,4,ORDE,6
FITEM,2,6
FITEM,2,15
FITEM,2,18
FITEM,2,34
FITEM,2,48
FITEM,2,-49
/GO
DL,P51X, ,UX,0
FLST,2,2,4,ORDE,2
FITEM,2,7
FITEM,2,22
/GO
DL,P51X, ,ALL,0
FLST,2,1,1,ORDE,1
FITEM,2,114
/GO
F,P51X,FY,-935
FINISH
/SOL
/STATUS,SOLU
SOLVE
FINISH
/POST1
PLESOL, S,EQV, 0,1.0
/cval,,1,100,500,1000,2000,3000,4000,5000
PLESOL, S,EQV, 0,1.0
/cval,,0.0001,0.001,0.01,0.1,1,100,1000,3000
/cval,0.0000001,0.000001,0.00001,0.0001,0.01,0.1,1,6000
/cval,0.000001,0.0001,0.01,1,100,1000,3000,6000
/cval,0.0000001,0.00001,0.001,0.1,10,100,1000,6000
/cval,0.000001,0.0001,0.01,1,100,1000,3000,6000
/cval,0.0000001,0.00001,0.001,0.1,10,100,1000,6000
/cval,0.0000001,0.00001,0.0001,0.01,1,10,100,6000
! Start of report captures.
~eui,'package require ansys'
~eui,'ansys::report::setdirectory "Project_hip_report"'
/PLOPTS,MINM,OFF
~eui,'ansys::report::finished'
! Start of report captures.
~eui,'package require ansys'
~eui,'ansys::report::setdirectory "Project_hip_report"'
/PLOPTS,MINM,OFF
~eui,'ansys::report::finished'
! Start of report captures.
~eui,'package require ansys'
~eui,'ansys::report::setdirectory "."'
/PLOPTS,MINM,OFF
~eui,'ansys::report::setOptions reverseVideo 1'
~eui,'ansys::report::imagecapture {Project_hip Image 1} '
~eui,'ansys::report::animcapture {Project_hip Animation 1} 100'
PLNS,S,EQV
ANDATA,0.5, ,0,0,0,1,0,1
~eui,'ansys::report::animcapture {Project_hip Animation 1} 100'
PLNS,S,EQV
ANDATA,10, ,0,0,0,1,0,1
~eui,'ansys::report::animcapture {Project_hip Animation 1} 100'
PLNS,S,EQV
ANDATA,10, ,1,0,-935,1,0,1
~eui,'ansys::report::finished'
PLNSOL,S,EQV
ANISOS,9,9
SAVE
SAVE
SAVE
SAVE
SAVE
SAVE
SAVE
FINISH
! /EXIT,MODEL
/BATCH
/COM,ANSYS RELEASE Release 18.1      BUILD 18.1      UP20170403       16:20:17
/input,menust,tmp,''
/GST,ON
/PLO,INFO,3
/GRO,CURL,ON
/CPLANE,1
WPSTYLE,,,,,,,,0
RESUME
/COM,ANSYS RELEASE Release 18.1      BUILD 18.1      UP20170403       16:20:29
RESUME
/COM,ANSYS RELEASE Release 18.1      BUILD 18.1      UP20170403       16:21:08
/SOLU
FINISH
/POST1
set,1
/EFACET,1
PLNSOL, S,EQV, 0,1.0
FINISH
! /EXIT,MODEL
/BATCH
/COM,ANSYS RELEASE Release 18.1      BUILD 18.1      UP20170403       11:38:39
/input,menust,tmp,''
/GST,ON
/PLO,INFO,3
/GRO,CURL,ON
/CPLANE,1
WPSTYLE,,,,,,,,0
/AUX12
FINISH
/SOL
/STATUS,SOLU
SOLVE
FINISH
/PREP7
FINISH
! /EXIT,NOSAV
/BATCH
/COM,ANSYS RELEASE Release 18.1      BUILD 18.1      UP20170403       11:41:30
/input,menust,tmp,''
/COM,ANSYS RELEASE Release 18.1      BUILD 18.1      UP20170403       11:41:31
/GST,ON
/PLO,INFO,3
/GRO,CURL,ON
/CPLANE,1
WPSTYLE,,,,,,,,0
/PREP7
EPLOT
MPLIST,ALL,,,EVLT
NPLOT
FINISH
/SOL
FINISH
! /EXIT,NOSAV
/BATCH
/COM,ANSYS RELEASE Release 18.1      BUILD 18.1      UP20170403       11:47:07
/input,menust,tmp,''
/COM,ANSYS RELEASE Release 18.1      BUILD 18.1      UP20170403       11:47:07
/GST,ON
/PLO,INFO,3
/GRO,CURL,ON
/CPLANE,1
WPSTYLE,,,,,,,,0
FINISH
! /EXIT,NOSAV
/BATCH
/COM,ANSYS RELEASE Release 18.1      BUILD 18.1      UP20170403       11:47:19
/input,menust,tmp,''
/COM,ANSYS RELEASE Release 18.1      BUILD 18.1      UP20170403       11:47:19
/GST,ON
/PLO,INFO,3
/GRO,CURL,ON
/CPLANE,1
WPSTYLE,,,,,,,,0
EPLOT
/AUX12
FINISH
/POST26
FILE,'Project_hip','rst','.'
NUMVAR,200
SOLU,191,NCMIT
STORE,MERGE
FILLDATA,191,,,,1,1
REALVAR,191,191
FINISH
/SOL
/STATUS,SOLU
SOLVE
FINISH
/POST1
/EFACET,1
PLNSOL, S,EQV, 0,1.0
SET,LIST
FINISH
/SOL
FINISH
/POST1
FINISH
/SOL
/STATUS,SOLU
SOLVE
FINISH
! /EXIT,NOSAV
